// COMSOL Multiphysics 5.4.0.225 model "zadatak1.mph"
// Outline of the model tree

Geometry
  geom1 "Geometry 1" (2D, length unit m)
    imp1: Import
      type = native
      filename = C:\Users\kenan\Downloads\Kabal_2_3.mphbin
      meshfilename = C:\Users\kenan\Downloads\Kabal_2_3.mphbin
    fin: Finalize "Form Union"

Materials
  mat1: Common "Material 1" on domains 5, 10, 15
    def "Basic"
      relpermittivity = 630
  mat2: Common "Material 2" on domains 1, 6, 11
    def "Basic"
      relpermittivity = 1
  mat3: Common "Material 3" on domains 2-4, 12-14
    def "Basic"
      relpermittivity = 2.4
  mat4: Common "Material 4" on domains 9
    def "Basic"
      relpermittivity = 10
  mat5: Common "Material 5" on domains 8
    def "Basic"
      relpermittivity = 6.66
  mat6: Common "Material 6" on domains 7
    def "Basic"
      relpermittivity = 3.33

Physics
  es: Electrostatics on all domains
    dependent variable V
    ccn1: ChargeConservation (default)
    zc1: ZeroCharge (default)
    init1: init "Initial Values 1" (default)
    gnd1: Ground on boundaries 1-4, 11, 12, 19-24, 31, 32, 39-44, 51, 52, 59, 60
    pot1: ElectricPotential on boundaries 9, 10, 15, 16, 29, 30, 35, 36, 49, 50, 55, 56 | V0 = 10000
    pot2: ElectricPotential on boundaries 47, 48, 54, 57 | V0 = 6600
    pot3: ElectricPotential on boundaries 45, 46, 53, 58 | V0 = 3300

Mesh
  mesh1 "Mesh 1" (physics-controlled)
    size: MeshSizeDefault | hauto = 3

Studies
  std1 "Study 1"
    stat: Stationary

Solver configurations
  sol1 "Solution 1" (study std1)
    v1: Variables "Dependent Variables 1"
    s1: Stationary "Stationary Solver 1"
      dDef: Direct
      fc1: FullyCoupled | linsolver = dDef

Datasets
  dset1: Solution | solution = sol1
  cln1: CutLine2D | data = dset1; genpoints = {{-0.5, 0}, {-0.48, 0}}
  cln2: CutLine2D | data = dset1; genpoints = {{0, 0}, {0.02, 0}}
  cln3: CutLine2D | data = dset1; genpoints = {{0.5, 0}, {0.52, 0}}

Plots
  pg1: PlotGroup2D "Electric Potential (es)" | data = dset1
    surf1: Surface | expr = V
  pg2: PlotGroup2D "2D Plot Group 2" | data = dset1
    surf1: Surface | data = dset1; expr = es.normE; descr = Electric field norm
  pg3: PlotGroup1D "1D Plot Group 3" | data = dset1
    lngr1: LineGraph | data = cln1; expr = es.normE; descr = Electric field norm; legends = kabel bez gradiranja izolacije
    lngr2: LineGraph
      data = cln2
      expr = es.normE
      descr = Electric field norm
      legends = kabel s kapacitivnim gradiranjem polja
    lngr3: LineGraph
      data = cln3
      expr = es.normE
      descr = Electric field norm
      legends = kabal s gradiranjem polja putem aluminijskih folija